TOL := 0.0001
k := 0.3
t := 0, 0.01 .. 2.5
d := 2.1
δ := % = 0.01
a := sqrt(d^2 - 4/(1 + k))
λ := sqrt(4/(1 - k) - d^2)
s(t) := (1/a*sinh(a*π*t) + 1/λ*sin(λ*π*t))*exp(-π*d*t)
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s_m := 0.351
0.0025/s_m = 0.00712251
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τ := 1.62
0.005/τ = 0.00308642
integral(s(t), t = 0 .. τ) = 0.157969
ps(t) := d/dt(s(t))
ps(0.152) = 0.00301888
