ORIGIN := 1
x := READPRN("data2.prn")
cols(x) = 1
n := length(x)
n = 100
var := 24
i := 1 .. 3
v1[i] := x[var + i - 1]
v2[i] := x[2*var + i - 1]
v3[i] := x[3*var + i - 1]
m[:, 1] := v1
m[:, 2] := v2
m[:, 3] := v3
m = [2, 99, 111; 9, 125, 102; 17, 96, 66]
ORIGIN := 1
y := READPRN("data1.prn")
z := y[:, 1]
n := last(z)
n = 100
i := 1 .. 3
var := 24
u1[i] := z[var + i - 1]
u2[i] := z[2*var + i - 1]
u3[i] := z[3*var + i - 1]
mat := augment(u1, u2, u3)
mat = [15, 11, 9; 9, 15, 14; 2, 8, 17]
M[:, 1] := m[:, 1]/tr(m)
M[:, 2] := vectorize(m[:, 2]/sqrt(tr(mat)))
M[i, 3] := rnd(10)
vd[i] := M[i, i]
M = [0.0103627, 14.4406, 7.10495; 0.0466321, 18.2331, 3.03986; 0.0880829, 14.003, 0.914113]
vd := reverse(sort(vd))
WRITEPRN("m.txt") := M
APPENDPRN("m.txt") := transpose(vd)
res := READPRN("m.txt")
res = [0.01036, 14.44, 7.105; 0.04663, 18.23, 3.04; 0.08808, 14, 0.9141; 18.23, 0.9141, 0.01036]
