TOL := 0.0001
s_m := 0.35
k := 0.3
t := 0, 0.01 .. 2.5
δ := % = 0.01
d := 2.1
a := sqrt(d^2 - 4/(1 + k))
λ := sqrt(4/(1 - k) - d^2)
s(t) := (1/a*sinh(a*π*t) + 1/λ*sin(λ*π*t))*e^(-π*d*t)
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τal := root(s(t) - 0.5*s_m, t, 0, 0.15) = 0.0351111
τar := root(s(t) - 0.5*s_m, t, 0.15, 1.6) = 0.417256
τ_a := τar - τal = 0.382144
τ := root(s(t) - %*0.5*s_m, t, 1.6, 2) = 1.85588
k := 0.7
d := 4
ω := 2*π
f(s) := s^4 + 2*d*ω*s^3 + (2/(1 - k^2) + d^2)*ω^2*s^2 + 2*d*ω^3*s/(1 - k^2) + ω^4/(1 - k^2)
s := -25, -24.9 .. 0
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s := -17.9
q1 := root(f(s), s) = -17.6966
s := -7.5
q2 := root(f(s), s) = -7.43617
s := -1
q3 := root(f(s), s) = -0.960722
f(s) := f(s)/((s - q1)*(s - q2)*(s - q3))
q4 := root(f(s), s) = -24.172
koe := [ω^4/(1 - k^2), 2*d*ω^3/(1 - k^2), (2/(1 - k^2) + d^2)*ω^2, 2*d*ω, 1]
polyroots(transpose(koe)) = [-24.172; -17.6966; -7.43617; -0.960722]
CTOL := 0.0001
x_1 := 0
x_2 := 0
x_3 := 0
x_4 := 0
Given
x_1 - atan(x_2) + sinh(x_3) == 1
3*x_2 + x_4^2 == 2
x_1*sin(x_2) - x_4^2 == 0
x_1 - x_2*x_3 == 2/exp(x_4)
[x_1; x_2; x_3; x_4] := Find(x_1, x_2, x_3, x_4) = [1.12516; 0.490117; 0.324806; 0.727769]
x_1 = 1.12516
x_3 = 0.324806
x_2 = 0.490117
x_4 = 0.727769
x_1 - atan(x_2) + sinh(x_3) = 1
3*x_2 + x_4^2 = 2
x_1*sin(x_2) - x_4^2 = 1.11022e-16
x_1 - x_2*x_3 = 0.965971
