h := 0.1  # шаг
n := 10  # число узловых точек
t := 0, 0.1 .. 1  # время
Given
d/dt(x(t)) == y(t)
d/dt(y(t)) == -x(t)
x(0) == 1
y(0) == 1
[x; y] := Odesolve([x; y], t, 1, n)
x(t) = [1; 1.09484; 1.17874; 1.25086; 1.31048; 1.35701; 1.38998; 1.40906; 1.41406; 1.40493; 1.38177]
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y(t) = [1; 0.895171; 0.781397; 0.659816; 0.531642; 0.398156; 0.260691; 0.120619; -0.0206551; -0.16172; -0.301171]
y := [1; 1]
D(t, y) := [y[1]; -y[0]]
ans := rkfixed(y, 0, 1, n, D)
i := 0, 1 .. n
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ans = [
    0, 1, 1;
    0.1, 1.09484, 0.895171;
    0.2, 1.17874, 0.781397;
    0.3, 1.25086, 0.659817;
    0.4, 1.31048, 0.531643;
    0.5, 1.35701, 0.398158;
    0.6, 1.38998, 0.260694;
    0.7, 1.40906, 0.120625;
    0.8, 1.41406, -0.0206484;
    0.9, 1.40494, -0.161716;
    1, 1.38177, -0.301168
]
f1(x, y, t) := y
f2(x, y, t) := -x
n := 10
h := 0.1
t := 0, 0.1 .. 1
i := 0 .. n
x[0] := 1
y[0] := 1
F1(x, y, t) := f1(x + f1(x, y, t)*h/2, y + f2(x, y, t)*h/2, t + h/2)
F2(x, y, t) := f2(x + f1(x, y, t)*h/2, y + f2(x, y, t)*h/2, t + h/2)
[x[i + 1]; y[i + 1]; t[j + 1]] := [x[i] + h; y[i] + F1(x[i], y[i], t[j])*h; t[i] + F2(x[i], y[i], t[j])*h]  # error: Эта переменная не определена.
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