k := 0.3
d := 2.1
τ := 1.62
n := 10
i := 0 .. n - 1
a := sqrt(d^2 - 4/(1 + k))
λ := sqrt(4/(1 - k) - d^2)
s(t) := (1/a*sinh(a*π*t) + 1/λ*sin(λ*π*t))*e^(-π*d*t)
x[i] := τ/n*i
y[i] := s(x[i])
lint(t) := linterp(x, y, t)
spint(t) := interp(cspline(x, y), x, y, t)
t := 0, 0.01 .. τ
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lint(0.5) = 0.12876
s(0.5) = 0.637582
spint(0.5) = 0.125037
x := [1, 2, 3, 4, 5, 6, 7, 8, 9, 10]
y := [-7, -15, -21, -22, -15, 3, 35, 84, 153, 200]
x := transpose(x)
y := transpose(y)
n := length(x)
i := 0 .. n - 1
m_x := mean(x) = 5.5
m_y := mean(y) = 39.5
D_x := var(x) = 8.25
D_y := var(y) = 5752.05
σ_x := stdev(x) = 2.87228
σ_y := stdev(y) = 75.8423
r := corr(x, y) = 0.861411
b := line(x, y)
alin(t) := b[0] + b[1]*t
p3 := regress(x, y, 3)
apol(t) := interp(p3, x, y, t)
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dol := 1/(n - 2)*vectorize(sum((y - alin(x))^2)) = 1854.83
dop := 1/(n - 2)*vectorize(sum((y - apol(x))^2)) = 44.6066
ORIGIN := 1
x := [1, 2, 3, 4, 5, 6, 7, 8, 9, 10]
y := [-7, -15, -21, -22, -15, 3, 35, 84, 153, 200]
x := transpose(x)
i := 1 .. 10
j := 1 .. 5
a[i, j] := x[i]^(j - 1)
X := a
Y := transpose(y)
B := (transpose(X)*X)^-1*transpose(X)*Y
Y = [-7; -15; -21; -22; -15; 3; 35; 84; 153; 200]
X = [
    1, 1, 1, 1, 1;
    1, 2, 4, 8, 16;
    1, 3, 9, 27, 81;
    1, 4, 16, 64, 256;
    1, 5, 25, 125, 625;
    1, 6, 36, 216, 1296;
    1, 7, 49, 343, 2401;
    1, 8, 64, 512, 4096;
    1, 9, 81, 729, 6561;
    1, 10, 100, 1000, 10000
]
B = [-22.5; 27.2797; -15.9642; 2.72902; -0.118007]
F(x) := B[1]*x^0 + B[2]*x^1 + B[3]*x^2 + B[4]*x^3 + B[5]*x^4
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