K := 128  # число точек описания сигнала
k := 0 .. K - 1  # порядковые номера точек описания сигнала
Fc1 := 1  # Гц  # частота первой гармонии сигнала
Tc1 := 1/(2*Fc1)
Tc1 = 0.5  # c  время существования сигнала
dt1 := Tc1/K
dt1 = 0.00390625
t1[k] := k*dt1
φ
φ := π/3  # π
U1[k] := sin(2*π*Fc1*t1[k] + φ)
φ = 1.0472
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Fc2 := 100
Tc2 := 1/Fc2
K2 := 128
k := 0 .. K2 - 1
dt2 := Tc2/K2
t2[k] := k*dt2
U2[k] := 0.2*sin(2*π*Fc2*t2[k]) + 0.4*sin(2*π*4*Fc2*t2[k])
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n := 0 .. K/2
sp1 := FFT(U1)*2
msp1[n] := if(n == 0, |sp1[n]|/2, |sp1[n]|)
Np := 16
msp1 = [
    0.32506; 0.761381; 0.295243; 0.188753; 0.139618; 0.111051; 0.09231; 0.079054; 0.069179; 0.0615383
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]
Fmax1 := 1/Tc1*Np
Fmax1 = 32
To1 := 1/(2*Fmax1)
To1 = 0.015625
Fd1 := 1/To1
Fd1 = 64
Fd := 2*Fmax1 = 64
Fmax2 := 4*Fc2
To2 := 1/(2*Fmax2)
To2 = 0.00125
M2 := 2*Tc2*Fmax2 + 1
M1 := 2*Tc1*Fmax1 + 1
M1 = 33
M2 = 9
j1 := 0 .. M1
M2 := 16
To2 := Tc2/M2
Mo1 := To1/dt1
To2 = 0.000625
j2 := 0 .. M2
Mo1 = 4
Mo2 := To2/dt2
m1[j1] := j1*Mo1
m2[j2] := j2*Mo2
Um1[k, j1] := if(k == m1[j1], U1[k], 0)
Um2[k, j2] := if(k == m2[j2], U2[k], 0)
Ud1[k] := sum(Um1[k, j1], j1)
Ud2[k] := sum(Um2[k, j2], j2)
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Ud1 = [
    0.866025; 0; 0; 0; 0.910864; 0; 0; 0; 0.94693; 0
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]
Um1 =  # no stored result
f[k, j1] := sin(2*π*Fmax1*(t1[k] - j1*To1))/(2*π*Fmax1*(t1[k] - j1*To1))
f1[k, j1] := if(t1[k] == j1*To1, 1, f[k, j1])
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UK[k] := sum(Ud1[j1]*f1[k, j1], j1)
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ΔU[k] := U1[k] - UK[k]
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n := 0 .. K/2
spd2 := FFT(Ud2)
mspd2[n] := |spd2[n]|
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f2[n] := n/Tc2
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U22[k] := 0.2*sin(2*π*1*Fc2*t2[k]) + 0.4*sin(2*π*4*Fc2*t2[k]) + 0.6*sin(2*π*9*Fc2*t2[k])
Um22[k, j2] := if(k == m2[j2], U22[k], 0)
Ud22[k] := sum(Um22[k, j2], j2)
spd22 := FFT(Ud22)
mspd22[n] := |spd22[n]|
f2[n] := n/Tc2
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