U0 := 0
Umax := 5.12
n := 6
Ux1 := 2.61
Ux2 := 2.59
N := 2^n = 64
ΔU := (Umax - U0)/N
i := 0 .. 63
Uy[i] := i*ΔU
Uy[i] = [
    0; 0.08; 0.16; 0.24; 0.32; 0.4; 0.48; 0.56; 0.64; 0.72
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]
Ux1 = 2.61
Ux11[i] := if(i ≤ N - 2 and Uy[i] < Ux1 < Uy[i + 1], if(Ux1 - Uy[i] < ΔU/2, Uy[i], Uy[i + 1]), 0)
Ux22[i] := if(Ux2 > Uy[i] and Ux2 - Uy[i] ≤ ΔU, Uy[i], 0)
Ux11 = [
    0; 0; 0; 0; 0; 0; 0; 0; 0; 0
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]
Ux22 = [
    0; 0; 0; 0; 0; 0; 0; 0; 0; 0
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]
Ux1 := 2.61
UK[i] := if(Ux1 ≥ Uy[i], 1, 0)
UP[i] := if(i < N - 1 and UK[i + 1] == UK[i], 0, UK[i])
UK = [
    1; 1; 1; 1; 1; 1; 1; 1; 1; 1
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]
UP = [
    0; 0; 0; 0; 0; 0; 0; 0; 0; 0
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]
R[0] := UP[1] or UP[3] or UP[5] or UP[7] or UP[9] or UP[11] or UP[13] or UP[15] or UP[17] or UP[19] or UP[21] or UP[23] or UP[25] or UP[27] or UP[29] or UP[31] or UP[33] or UP[35] or UP[37] or UP[39] or UP[41] or UP[43] or UP[45] or UP[47] or UP[49] or UP[51] or UP[53] or UP[55] or UP[57] or UP[59] or UP[61] or UP[63]
R[1] := UP[2] or UP[3] or UP[6] or UP[7] or UP[10] or UP[11] or UP[14] or UP[15] or UP[18] or UP[19] or UP[22] or UP[23] or UP[26] or UP[27] or UP[30] or UP[31] or UP[34] or UP[35] or UP[38] or UP[39] or UP[42] or UP[43] or UP[46] or UP[47] or UP[50] or UP[51] or UP[54] or UP[55] or UP[58] or UP[59] or UP[62] or UP[63]
R[2] := UP[4] or UP[5] or UP[6] or UP[7] or UP[12] or UP[13] or UP[14] or UP[15] or UP[20] or UP[21] or UP[22] or UP[23] or UP[28] or UP[29] or UP[30] or UP[31] or UP[36] or UP[37] or UP[38] or UP[39] or UP[44] or UP[45] or UP[46] or UP[47] or UP[52] or UP[53] or UP[54] or UP[55] or UP[60] or UP[61] or UP[62] or UP[63]
R[3] := UP[8] or UP[9] or UP[10] or UP[11] or UP[12] or UP[13] or UP[14] or UP[15] or UP[24] or UP[25] or UP[26] or UP[27] or UP[28] or UP[29] or UP[30] or UP[31] or UP[40] or UP[41] or UP[42] or UP[43] or UP[44] or UP[45] or UP[46] or UP[47] or UP[56] or UP[57] or UP[58] or UP[59] or UP[60] or UP[61] or UP[62] or UP[63]
R[4] := UP[16] or UP[17] or UP[18] or UP[19] or UP[20] or UP[21] or UP[22] or UP[23] or UP[24] or UP[25] or UP[26] or UP[27] or UP[28] or UP[29] or UP[30] or UP[31] or UP[48] or UP[49] or UP[50] or UP[51] or UP[52] or UP[53] or UP[54] or UP[55] or UP[56] or UP[57] or UP[58] or UP[59] or UP[60] or UP[61] or UP[62] or UP[63]
R[5] := UP[32] or UP[33] or UP[34] or UP[35] or UP[36] or UP[37] or UP[38] or UP[39] or UP[40] or UP[41] or UP[42] or UP[43] or UP[44] or UP[45] or UP[46] or UP[47] or UP[48] or UP[49] or UP[50] or UP[51] or UP[52] or UP[53] or UP[54] or UP[55] or UP[56] or UP[57] or UP[58] or UP[59] or UP[60] or UP[61] or UP[62] or UP[63]
r := reverse(R)
R = [0; 0; 0; 0; 0; 1]
transpose(r) = [1, 0, 0, 0, 0, 0]
Uоп := 5.12
n := 10
i := 0 .. n - 1
Uc[i] := Uоп/2^(i + 1)
Ux1 := 2.61
Uс[0] := Uc[0]
R[0] := if(Ux1 ≥ Uc[0], 1, 0)
# i  1
Uc[1] := if(R[0] == 0, Uc[0] - Uc[1], Uc[0] + Uc[1]) = 3.84
R[1] := if(Ux1 ≥ Uc[1], 1, 0)
Uc[2] := if(R[1] == 0, Uc[1] - Uc[2], Uc[1] + Uc[2])
R[2] := if(Ux1 ≥ Uc[2], 1, 0)
Uc[3] := if(R[2] == 0, Uc[2] - Uc[3], Uc[2] + Uc[3])
R[3] := if(Ux1 ≥ Uc[3], 1, 0)
Uc[4] := if(R[3] == 0, Uc[3] - Uc[4], Uc[3] + Uc[4])
R[4] := if(Ux1 ≥ Uc[4], 1, 0)
Uc[5] := if(R[4] == 0, Uc[4] - Uc[5], Uc[4] + Uc[5])
R[5] := if(Ux1 ≥ Uc[5], 1, 0)
Uc[6] := if(R[5] == 0, Uc[5] - Uc[6], Uc[5] + Uc[6])
R[6] := if(Ux1 ≥ Uc[6], 1, 0)
Uc[7] := if(R[6] == 0, Uc[6] - Uc[7], Uc[6] + Uc[7])
R[7] := if(Ux1 ≥ Uc[7], 1, 0)
Uc[8] := if(R[7] == 0, Uc[7] - Uc[8], Uc[7] + Uc[8])
R[8] := if(Ux1 ≥ Uc[8], 1, 0)
Uc[9] := if(R[8] == 0, Uc[8] - Uc[9], Uc[8] + Uc[9])
R[9] := if(Ux1 ≥ Uc[9], 1, 0)
τ := 0.25
i := 0 .. n
t[i] := i*τ
R = [1; 0; 0; 0; 0; 0; 1; 0; 1; 0]
Tпр := τ*n
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σкв1 := ΔU/(2*sqrt(3))
σкв1 = 0.023094
σкв2 := ΔU/sqrt(3)
σкв2 = 0.046188
