τ := 140*10^-6
i := 0 .. 10
p[i, 0] := 0 + i*0.1
H[i] := if(p[i] ≠ 0 and p[i] ≠ 1, -p[i]*log(p[i], 2) - (1 - p[i])*log(1 - p[i], 2), 0)
p = [0; 0.1; 0.2; 0.3; 0.4; 0.5; 0.6; 0.7; 0.8; 0.9; 1]
H = [0; 0.468996; 0.721928; 0.881291; 0.970951; 1; 0.970951; 0.881291; 0.721928; 0.468996; 0]
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p1 := [0.3; 0.5; 0.8]
j := 0 .. 2
H1[j] := -p1[j]*log(p1[j], 2) - (1 - p1[j])*log(1 - p1[j], 2)
H1 = [0.881291; 1; 0.721928]
I0 := H1/τ
I0 = [6294.93; 7142.86; 5156.63]
C0 := max(I0) = 7142.86
N := 4
i := 0 .. 3
j := 0 .. 3
pyx := [0.9, 0.05, 0.03, 0.02; 0.02, 0.9, 0.05, 0.03; 0.03, 0.02, 0.9, 0.05; 0.05, 0.03, 0.02, 0.9]
px[i, 0] := 0.25
px = [0.25; 0.25; 0.25; 0.25]
pxandy[i, j] := px[i, 0]*pyx[i, j]
pxandy = [
    0.225, 0.0125, 0.0075, 0.005;
    0.005, 0.225, 0.0125, 0.0075;
    0.0075, 0.005, 0.225, 0.0125;
    0.0125, 0.0075, 0.005, 0.225
]
py[j] := sum(pxandy[i, j], i)
py = [0.25; 0.25; 0.25; 0.25]
pxy[i, j] := pxandy[i, j]*px[i]
pxy = [
    0.05625, 0.003125, 0.001875, 0.00125;
    0.00125, 0.05625, 0.003125, 0.001875;
    0.001875, 0.00125, 0.05625, 0.003125;
    0.003125, 0.001875, 0.00125, 0.05625
]
py[j] := sum(pxy[i, j], i)
pxy := [0.9; 0.05; 0.03; 0.02; 0.02; 0.9; 0.05; 0.03; 0.03; 0.02; 0.9; 0.05; 0.05; 0.03; 0.02; 0.9]
HX := log(N, 2) = 2
py = [0.0625; 0.0625; 0.0625; 0.0625]
HXY := -sum(py[i], i)*sum(pxy[j]*log(pxy[j], 2), j) = 0.154386
IYX := HX - HXY = 1.84561
Δ := 0.01
NB := 3
p1x[i] := if(i < N/2, px[i] + Δ*NB, px[i] - Δ*NB)
p1x = [0.28; 0.28; 0.22; 0.22]
HX1 := -sum(p1x[i]*log(p1x[i], 2), i) = 1.98959
pxandy1[i, j] := p1x[i, 0]*pyx[i, j]
pxandy1 = [
    0.252, 0.014, 0.0084, 0.0056;
    0.0056, 0.252, 0.014, 0.0084;
    0.0066, 0.0044, 0.198, 0.011;
    0.011, 0.0066, 0.0044, 0.198
]
p1y[j] := sum(pxandy1[i, j], i)
p1y = [0.2752; 0.277; 0.2248; 0.223]
pxy1[i, j] := pxandy1[i, j]*p1y[i]
pxy1 = [
    0.0693504, 0.0038528, 0.00231168, 0.00154112;
    0.0015512, 0.069804, 0.003878, 0.0023268;
    0.00148368, 0.00098912, 0.0445104, 0.0024728;
    0.002453, 0.0014718, 0.0009812, 0.044154
]
pxy1 := transpose([0.9, 0.05, 0.03, 0.02, 0.02, 0.9, 0.05, 0.03, 0.03, 0.02, 0.9, 0.05, 0.05, 0.03, 0.02, 0.9])
HXY1 := -sum(p1y[i], i)*sum(pxy1[j]*log(pxy1[j], 2), j) = 0.617543
IYX1 := HX1 - HXY1 = 1.37204
2.2.2
K := 12
k := 0 .. K - 1
Δ := 1/K = 0.0833333
Pош[k] := k*Δ
Pош = [0; 0.0833333; 0.166667; 0.25; 0.333333; 0.416667; 0.5; 0.583333; 0.666667; 0.75; 0.833333; 0.916667]
P0 := [0.3; 0.5; 0.8]
i := 0 .. 2
HZ1[k, i] := if(Pош[k] == 1, 0, -1/τ*((P0[i]*(1 - Pош[k]) + (1 - P0[i])*Pош[k])*log(P0[i]*(1 - Pош[k]) + (1 - P0[i])*Pош[k], 2) + ((1 - P0[i])*(1 - Pош[k]) + P0[i]*Pош[k])*log((1 - P0[i])*(1 - Pош[k]) + P0[i]*Pош[k], 2)))
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HZY[k] := if(Pош[k] == 0 or Pош[k] == 1, 0, -1/τ*((1 - Pош[k])*log(1 - Pош[k], 2) + Pош[k]*log(Pош[k], 2)))
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I1[k] := HZ1[k, 0] - HZY[k]
I2[k] := HZ1[k, 1] - HZY[k]
I3[k] := HZ1[k, 2] - HZY[k]
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max(I0) = 7142.86
max(I1) = 6294.93
max(I2) = 7142.86
max(I3) = 5156.63
Cc[k] := if(Pош[k] == 0 or Pош[k] == 1, max(I2), 1/τ*(1 + (1 - Pош[k])*log(1 - Pош[k], 2) + Pош[k]*log(Pош[k], 2)))
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