ORIGIN := 1
k := 4
p := 4*10^-4
code := [0, 0, 1, 1]
n := 8
x := root(2^n/(n + 1) - 2^k, n) = 7
n := 7
Pисх := 1 - (1 - p)^n = 0.00279664
Pхемм := Pисх - combin(n, 1)*p*(1 - p)^(n - 1) = 3.35552e-6
r := n - k = 3
transpose(reverse(transpose(code))) = [1, 1, 0, 0]
code_1 := transpose([x, x, 1, x, 1, 1, 0])
[1, 2, 3, 4, 5, 6, 7]
b_1 := code_1[3] xor code_1[5] xor code_1[7] = 0
b_2 := code_1[3] xor code_1[6] xor code_1[7] = 0
b_3 := code_1[5] xor code_1[6] xor code_1[7] = 0
code_1_hemm := transpose([1, 0, 1, 1, 1, 1, 0])
[1, 2, 3, 4, 5, 6, 7]
S1 := code_1_hemm[1] xor code_1_hemm[3] xor code_1_hemm[5] xor code_1_hemm[7] = 1
S2 := code_1_hemm[2] xor code_1_hemm[3] xor code_1_hemm[6] xor code_1_hemm[7] = 0
S3 := code_1_hemm[4] xor code_1_hemm[5] xor code_1_hemm[6] xor code_1_hemm[7] = 1
[S3, S2, S1] = [1, 0, 1]
code_1_hemm1 := transpose([1, 0, 1, 1, 1, 1, 1])
[1, 2, 3, 4, 5, 6, 7]
S1 := code_1_hemm1[1] xor code_1_hemm1[3] xor code_1_hemm1[5] xor code_1_hemm1[7] = 0
S2 := code_1_hemm1[2] xor code_1_hemm1[3] xor code_1_hemm1[6] xor code_1_hemm1[7] = 1
S3 := code_1_hemm1[4] xor code_1_hemm1[5] xor code_1_hemm1[6] xor code_1_hemm1[7] = 0
[S3, S2, S1] = [0, 1, 0]
code_1_hemm2 := transpose([1, 0, 1, 1, 1, 0, 0])
[1, 2, 3, 4, 5, 6, 7]
S1 := code_1_hemm2[1] xor code_1_hemm2[3] xor code_1_hemm2[5] xor code_1_hemm2[7] = 1
S2 := code_1_hemm2[2] xor code_1_hemm2[3] xor code_1_hemm2[6] xor code_1_hemm2[7] = 1
S3 := code_1_hemm2[4] xor code_1_hemm2[5] xor code_1_hemm2[6] xor code_1_hemm2[7] = 0
[S3, S2, S1] = [0, 1, 1]
code_1_hemm1[7] := code_1_hemm1[7] xor 1
transpose(code_1_hemm1) = [1, 0, 1, 1, 1, 1, 0]
transpose(code_1_hemm) = [1, 0, 1, 1, 1, 1, 0]
code_1_hemm2[6] := code_1_hemm2[6] xor 1
transpose(code_1_hemm2) = [1, 0, 1, 1, 1, 1, 0]
transpose(code_1_hemm) = [1, 0, 1, 1, 1, 1, 0]
