K := 12
F1 := 1
k := 0 .. K - 1
T1 := 1/F1
Uo := 0
I := 1000
Ω1 := 2*π*F1
dt := T1/I
i := 0 .. I - 1
t[i] := dt*i
U6 := 1/11
U5 := 1/9
φsin[k, i] := sin(2*π*F1*k*t[i])
U1 := 1
U2 := 1/3
φcos[k, i] := cos(2*π*F1*k*t[i])
U4 := 1/7
U3 := 1/5
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F2 := 3*F1
F3 := 5*F1
F4 := 7*F1
F5 := 9*F1
F6 := 11*F1
U[i] := U1*sin(2*π*F1*t[i]) + U2*sin(2*π*F2*t[i]) + U3*sin(2*π*F3*t[i]) + U4*sin(2*π*F4*t[i]) + U5*sin(2*π*F5*t[i]) + U6*sin(2*π*F6*t[i])
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a[k] :=
    □ if □  # error: Пустой местозаполнитель.
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