F1 := 1
U1 := 1
U0 := 0
U3 := 1/3
U5 := 1/5
U9 := 1/9
U7 := 1/7
U11 := 1/11
f0 := 10*11
f0 = 110
T0 := 1/f0
Tc := 1/F1
NB := 19
dt := T0/20
dt - дискретная составляющая для времени
I := Tc/dt
I - количество точек описания сигнала
i := 0 .. I - 1
i - номера точек описания сигнала
t[i] := i*dt  # ti – время
Uc1[i] := U1*sin(2*π*F1*t[i])
Uc3[i] := U3*sin(2*π*3*F1*t[i])
Uc5[i] := U5*sin(2*π*5*F1*t[i])
Uc7[i] := U7*sin(2*π*7*F1*t[i])
Uc9[i] := U9*sin(2*π*9*F1*t[i])
Uc11[i] := U11*sin(2*π*11*F1*t[i])
Uc[i] := Uc1[i] + Uc3[i] + Uc5[i] + Uc7[i] + Uc9[i] + Uc11[i]
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Ug0 := max(Uc)
Ug0 = 0.927782
Ug[i] := Ug0*sin(2*π*f0*t[i])
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spUg := CFFT(Ug)*2
f[i] := i/Tc
mspUg[i] := if(i == 0, |spUg[i]/2|, |spUg[i]|)
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m := 2*3/10
UAM[i] := Ug[i]*(1 + m*Uc[i]/max(Uc))
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spUAM := CFFT(UAM)*2
mspUAM[i] := if(i == 0, |spUAM[i]/2|, |spUAM[i]|)
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