F1 := 10
U0 := 0
U1 := 19
U3 := U1/3
NB := 19
Fmax := 110
U5 := U1/5
F_d := Fmax*(NB + 2) = 2310
U7 := U1/7
m := NB/20 = 0.95
U9 := U1/9
T_d := 1/F_d
U11 := U1/11
tu := 0.2*T_d
dt := tu/5
Tc := 1/F1 = 0.1
I := Tc/dt
i := 0 .. I - 1
t[i] := i*dt
Uc1[i] := U1*sin(2*π*F1*t[i])
f[i] := i/Tc
Uc3[i] := U3*sin(2*π*3*F1*t[i])
Uc5[i] := U5*sin(2*π*5*F1*t[i])
Uc7[i] := U7*sin(2*π*7*F1*t[i])
Uc9[i] := U9*sin(2*π*9*F1*t[i])
Uc11[i] := U11*sin(2*π*11*F1*t[i])
Uc[i] := Uc1[i] + Uc3[i] + Uc5[i] + Uc7[i] + Uc9[i] + Uc11[i]
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Uu0 := max(Uc)
Uu0 = 17.628
tu0 := tu/dt = 5
Tp := T_d/dt = 25
Uu[i] := if(0 ≤ mod(i, Tp) < tu0, Uu0, 0)
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spUu := CFFT(Uu)*2
mspUu[i] := if(i == 0, |spUu[i]/2|, |spUu[i]|)
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24*F_d = 55440
F_d = 2310
UAM[i] := Uu[i]*(1 + m*Uc[i]/max(Uc))
UAIM[i] := if(0 ≤ mod(i, Tp) < tu0, Uc[i], 0)
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spUAIM := CFFT(UAIM)*2
mspUAIM[i] := if(i == 0, |spUAIM[i]/2|, |spUAIM[i]|)
spUAM := CFFT(UAM)*2
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mspUAM[i] := if(i == 0, |spUAM[i]/2|, |spUAM[i]|)
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F_d = 2310
2310 + 4000 = 6310
