n := 25  # Фомин Александр Сергеевич
m := 16
H_max := log(m, 2) = 4
i := 1 .. m
m[1] := 1  # число повторений 'ф'
m[2] := 1  # число повторений 'о'
m[3] := 1  # число повторений 'м'
m[4] := 2  # число повторений 'и'
m[5] := 2  # число повторений 'н'
m[6] := 2  # число повторений 'а'
m[7] := 1  # число повторений 'л'
m[8] := 4  # число повторений 'е'
m[9] := 1  # число повторений 'к'
m[10] := 2  # число повторений 'c'
m[11] := 1  # число повторений 'д'
m[12] := 2  # число повторений 'р'
m[13] := 1  # число повторений 'г'
m[14] := 1  # число повторений 'в'
m[15] := 1  # число повторений 'ч'
m[16] := 2  # число повторений '_'
px[i] := m[i]/n
px[i] = [0.04; 0.04; 0.04; 0.08; 0.08; 0.08; 0.04; 0.16; 0.04; 0.08; 0.04; 0.08; 0.04; 0.04; 0.04; 0.08]
Hx := -sum(px[i]*log(px[i], 2), i) = 3.84386  # дв.ед./сообщение
m := 16
τ := 24
Hx = 3.84386
Hx_max := log(m, 2) = 4  # дв.ед./сообщение
r := log(m, 2) = 4
R := (Hx_max - Hx)/Hx_max = 0.039036
Ix := Hx*m = 61.5017  # дв. ед
