ORIGIN := 1
m := 16
i := 1 .. m
n := 25
τ := 24*10^-3
m[1] := 1  # число повторений 'ф'
m[2] := 1  # число повторений 'о'
# Фомин Александр Сергеевич
m[3] := 1  # число повторений 'м'
m[4] := 2  # число повторений 'и'
n := 25
m[5] := 2  # число повторений 'н'
m[6] := 2  # число повторений 'а'
m[7] := 1  # число повторений 'л'
m[8] := 4  # число повторений 'е'
m[9] := 1  # число повторений 'к'
m[10] := 2  # число повторений 'c'
m[11] := 1  # число повторений 'д'
m[12] := 2  # число повторений 'р'
m[13] := 1  # число повторений 'г'
m[14] := 1  # число повторений 'в'
m[15] := 1  # число повторений 'ч'
m[16] := 2  # число повторений '_'
p[i] := m[i]/n
p = [0.04; 0.04; 0.04; 0.08; 0.08; 0.08; 0.04; 0.16; 0.04; 0.08; 0.04; 0.08; 0.04; 0.04; 0.04; 0.08]
I_max := 1/τ = 41.6667  # (дв, ед)/c
H := -sum(p[i]*log(p[i], 2), i) = 3.84386  # (дв, ед)/c
m := 16
r := log(m, 2) = 4
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τr := τ*r = 0.096  # с
Ir := H/τr = 40.0402  # (дв, ед)/c
p = [0.04; 0.04; 0.04; 0.08; 0.08; 0.08; 0.04; 0.16; 0.04; 0.08; 0.04; 0.08; 0.04; 0.04; 0.04; 0.08]
# 1 - 1-5
# 2 - 6-16
# 1.1 - 1-2
# 1.2 - 3-5
# 2.1 - 6-9
# 2.2 - 10-16
M := [
    "событие", "p", "код", "t1";
    1, 0.16, 000, 3;
    2, 0.08, 001, 3;
    3, 0.08, 010, 3;
    4, 0.08, 0110, 4;
    5, 0.08, 0111, 4;
    6, 0.08, 1000, 4;
    7, 0.08, 1001, 3;
    8, 0.04, 1010, 4;
    9, 0.04, 1011, 4;
    10, 0.04, 1100, 4;
    11, 0.04, 11010, 5;
    12, 0.04, 11011, 5;
    13, 0.04, 11100, 5;
    14, 0.04, 11101, 5;
    15, 0.04, 11110, 5;
    16, 0.04, 11111, 5
]
τ1 := [3; 3; 4; 4; 4; 4; 3; 4; 4; 4; 5; 5; 5; 5; 5; 5]
p := [0.16; 0.08; 0.08; 0.08; 0.08; 0.08; 0.08; 0.04; 0.04; 0.04; 0.04; 0.04; 0.04; 0.04; 0.04; 0.04]
τp := τ1*τ  # с
τcp := sum(p[i]*τp[i], i)  # с
τcp = 0.09408  # c
I_fano := H/τcp = 40.8573  # (дв, ед)/c
Ir = 40.0402  # (дв, ед)/c
I_fano = 40.8573  # (дв, ед)/c
Lcp := 0.48 + 0.48 + 1.28 + 0.48 + 1.20 = 3.92  # символов
