k := 5
n := k + 2 = 7
MP := 1
p := MP*10^-3
Pправ := (1 - p)^n = 0.993021
Pнеправ := 1 - Pправ = 0.00697903
P1 := combin(n, 1)*p*(1 - p)^(n - 1) = 0.0069581
Pненайд1 := Pнеправ - P1 = 2.09301e-5
p1 := p^2
PпрКор := (1 - p1)^n = 0.999993
PненайдКор := 1 - PпрКор = 6.99998e-6
P1I := combin(n, 1)*p*(1 - p)^(n - 1) = 0.0069581
P2I := Pнеправ - P1I = 2.09301e-5
